# Compressed DPA4C graph-lower (.pt2) NVT throughput benchmark on diamond
# carbon, CPU host path (pair_style deepmd, no Kokkos).
units           metal
boundary        p p p
atom_style      atomic
atom_modify     map yes

read_data       ${datafile}

pair_style      deepmd ${model}
pair_coeff      * * C

neighbor        1.0 bin
neigh_modify    every 1 delay 0 check yes

velocity        all create 300.0 12345 mom yes rot yes dist gaussian
fix             1 all nvt temp 300.0 300.0 0.1
timestep        0.001

thermo          ${nsteps}
run             ${warmup}       # warmup: AOTInductor first launch + neighbor build
run             ${nsteps}       # timed run (last timing breakdown is parsed)
